# Vesicle membrane + ring-polymer + LJ solvent benchmark.
# Reads a pre-prepared data file (membrane + polymer + solvent) produced by
# prepare_polymer_solvent.lmp. The driver script ensures that file exists.
#
# Required variables (from the bench driver):
#   data_file   path to prepared data file (relative to bench_runs/<sim_id>/)
#   t_run       number of timesteps
#
# Atom types:
#   1  membrane  (dipole_sphere fields, nve/sphere + langevin)
#   2  polymer   (ring beads, FENE bonds, cosine angles, nve)
#   3  solvent   (LJ beads, nve)

variable v_t_run    string ${t_run}
variable v_data     string ${data_file}

variable v_rcut    equal 2.5
variable v_splay   equal 1.0
variable v_tilt    equal 15.0
variable v_wc      equal 2.0
variable v_zeta    equal 5
variable v_T       equal 0.2
variable v_dt      equal 0.01
variable t_dump    equal 5000

units      lj
# "hybrid angle sphere dipole" (default) or the custom "dipole_sphere_angle"
# (same data file columns; only the custom style supports Kokkos device sorting)
variable atomstyle index "hybrid angle sphere dipole"
atom_style      ${atomstyle}
neighbor   1.0 bin
neigh_modify delay 1 every 1 check yes binsize 5
# neigh_modify delay 5 every 1 check yes binsize 5.0
boundary   p p p

read_data ../../${v_data}

group membrane type 1
group polymer  type 2
group solvent  type 3


# compute T_all_tr  all      temp
# compute T_mem_tr  membrane temp
# compute T_pol_tr  polymer  temp
# compute T_sol_tr  solvent  temp

# thermo_style custom step spcpu cpuremain temp &
#     c_T_all_tr c_T_mem_tr c_T_pol_tr c_T_sol_tr &
#     pe ke press
thermo_style custom step spcpu cpuremain temp pe
thermo ${t_dump}

# ---- Pair potentials ----
pair_style hybrid mesomem/dipole ${v_rcut} lj/cut 1.12246152962189
pair_coeff 1 1 mesomem/dipole 1.0 1.0 ${v_tilt} ${v_splay} ${v_rcut} ${v_wc} ${v_zeta} 0.0
pair_coeff 2 2 lj/cut 1.0 1.0 1.12246152962189
pair_coeff 3 3 lj/cut 1.0 1.0 1.12246152962189
pair_coeff 1 2 lj/cut 1.0 1.0 1.12246152962189
pair_coeff 1 3 lj/cut 1.0 1.0 1.12246152962189
pair_coeff 2 3 lj/cut 1.0 1.0 1.12246152962189

# ---- Bond and angle styles (polymer rings) ----
bond_style  fene
bond_coeff  1 30.0 1.5 1.0 1.0
special_bonds fene

angle_style cosine
angle_coeff 1 2.0

timestep ${v_dt}

# dump dum1 all custom ${t_dump} position.lammpstrj id type mol x y z

# compute Tmem membrane temp/sphere dof all


# ---- Integrators ----
fix f_nve_mem membrane nve/sphere update dipole
fix f_nve_pol polymer  nve
fix f_nve_sol solvent  nve

fix fLang1 all langevin ${v_T} ${v_T} 1.0 123 omega yes
# fix fLang2 polymer langevin 1.0 1.0 1.0 123
# fix fLang3 solvent langevin 1.0 1.0 1.0 123

# fix_modify fLang1 temp Tmem
# fix_modify fLang2 temp T_pol_tr
# fix_modify fLang3 temp T_sol_tr

run ${v_t_run}
