units lj
atom_style sphere
boundary p p p

lattice fcc 0.8
region box block 0 8 0 8 0 8
create_box 1 box
create_atoms 1 box

set type 1 diameter 1.0
set type 1 density 1.0

pair_style lj/cut 2.5
pair_coeff 1 1 1.0 1.0 2.5

velocity all create 1.0 12345 dist gaussian

compute T_sp all temp/sphere
compute T_tr all temp

thermo_style custom step temp c_T_sp c_T_tr ke
thermo 100

fix fnve  all nve/sphere
fix flang all langevin 1.0 1.0 1.0 12345 omega yes

run 2000
